// SBML level 2 version 4

function Rate_Law_for_Aerobic(Warburg_param, k_aer_w, substrate, k_aer)
  Warburg_param*k_aer_w*substrate + (1 - Warburg_param)*k_aer*substrate;
end

function Rate_Law_for_Anaerobic(Warburg_param, k_ane_w, substrate, k_ane)
  Warburg_param*k_ane_w*substrate + (1 - Warburg_param)*k_ane*substrate;
end

model New_Model_2()

  // Compartments:
  compartment Intracellular = 1;

  // Species:
  species Glucose in Intracellular = 100;
  species Oxygen in Intracellular = 100;
  species Energy in Intracellular = 450;
  species Lactate in Intracellular = 0;
  species apoptosis_rate in Intracellular = 0;
  species migration_speed in Intracellular = 0;
  species Lac_Secretion_Rate in Intracellular = 0;
  species Transition_Rate in Intracellular = 0;
  species Warburg_flag in Intracellular = 0;

  // Parameters:
  k_aer = 0.01;
  k_ane = 0.001;
  k_usage = 0.0023;
  energy_move_thresh = 440;
  energy_death_thresh = 430;
  energy_prolif_thresh = 445;
  k_aer_w = 0.001;
  k_ane_w = 0.1;
  Warburg_param = 0;
  Warburg_thresh = 20;

  // Reactions:
  Aerobic: Glucose + 6 Oxygen => 38 Energy; Intracellular*Rate_Law_for_Aerobic(Warburg_param, k_aer_w, Glucose, k_aer);
  Anaerobic: Glucose => 2 Energy + Lactate; Intracellular*Rate_Law_for_Anaerobic(Warburg_param, k_ane_w, Glucose, k_ane);
  Energy_Usage: Energy => ; Intracellular*k_usage*Energy;

  // Events:
  divide: at (Energy > energy_prolif_thresh): Transition_Rate = 0.00016;
  Warburg_switch: at (Oxygen < Warburg_thresh): Warburg_flag = 1, Warburg_param = 1;

  // Unit definitions:
  unit length = metre;
  unit area = metre^2;
  unit volume = litre;
  unit time = second;
  unit substance = mole;
end
