// SBML level 2 version 4

function Rate_Law_for_Anaerobic(Warburg_param, k_ane_w, substrate, k_ane)
  Warburg_param*k_ane_w*substrate + (1 - Warburg_param)*k_ane*substrate;
end

function Rate_Law_for_Aerobic_1(Warburg_param, k_aer_w, substrate, o2, k_aer)
  Warburg_param*k_aer_w*substrate*o2*o2*o2*o2*o2*o2 + (1 - Warburg_param)*k_aer*substrate*o2*o2*o2*o2*o2*o2;
end

function Rate_Law_for_Aerobic(Warburg_param, k_aer_w, substrate, k_aer)
  Warburg_param*k_aer_w*substrate + (1 - Warburg_param)*k_aer*substrate;
end

model New_Model_2()

  // Compartments:
  compartment Intracellular = 1;

  // Species:
  species Glucose in Intracellular = 100;
  species Oxygen in Intracellular = 100;
  species Energy in Intracellular = 450;
  species Lactate in Intracellular = 0;
  species apoptosis_rate in Intracellular = 0;
  species migration_speed in Intracellular = 0;
  species Lac_Secretion_Rate in Intracellular = 0;
  species Transition_Rate in Intracellular = 0;
  species Warburg_flag in Intracellular = 0;

  // Parameters:
  k_aer = 0.01;
  k_ane = 0.00018;
  k_usage = 0.0023;
  energy_move_thresh = 440;
  energy_death_thresh = 430;
  energy_prolif_thresh = 445;
  k_aer_w = 0.001;
  k_ane_w = 0.018;
  Warburg_param = 0;
  Warburg_thresh = 0.7;

  // Reactions:
  Aerobic: Glucose + 6 Oxygen => 38 Energy; Intracellular*Rate_Law_for_Aerobic_1(Warburg_param, k_aer_w, Glucose, Oxygen, k_aer);
  Anaerobic: Glucose => 2 Energy + Lactate; Intracellular*Rate_Law_for_Anaerobic(Warburg_param, k_ane_w, Glucose, k_ane);
  Energy_Usage: Energy => ; Intracellular*k_usage*Energy;

  // Events:
  divide: at (Energy > energy_prolif_thresh): Transition_Rate = 0.00016;
  Warburg_switch: at (Oxygen < Warburg_thresh): Warburg_flag = 1, Warburg_param = 1;
  die: at (Energy < energy_death_thresh): apoptosis_rate = 9e99;
  do_not_divide: at (Energy < energy_prolif_thresh): Transition_Rate = 0;
  do_not_move: at (Energy > energy_move_thresh): migration_speed = 0;
  Lac_Sec: at (Lactate > 0.01): Lac_Secretion_Rate = 0.0001;
  move: at (Energy < energy_move_thresh): migration_speed = 10;

  // Unit definitions:
  unit substance = mole;
  unit length = metre;
  unit area = metre^2;
  unit volume = litre;
  unit time = second;
end
